// SBML level 3 version 1

model Deterministic()
  // model units - substance: substance, time: time_unit, volume: volume

  // Compartments:
  compartment Cytoplasm = 5.25e-12 volume;
  compartment Nucleus = 1.75e-12 volume;

  // Species:
  species cyt_prot__LIGAND_ in Cytoplasm = 0;
  species cyt_prot__RECEPTOR_ in Cytoplasm = 100;
  species cyt_prot__LIGAND__RECEPTOR_ in Cytoplasm = 0;

  // Parameters:
  kTL1_1 = 1;
  cyt_mrna__LIGAND_ = 5;
  kTL2_1 = 1;
  cyt_mrna__RECEPTOR_ = 5;
  kLR1_1 = 0.001;
  kLR2_1 = 0.001;
  kLR3_1 = 5e-5;
  kLR4_1 = 5e-5;
  kLR5_1 = 5e-5;
  nuc_gene_a__LIGAND_ = 1;
  nuc_gene_i__LIGAND_ = 1;
  nuc_gene_a__RECEPTOR_ = 1;
  nuc_gene_i__RECEPTOR_ = 1;
  kGac1_1 = 0.0005;
  kGac2_1 = 0.0005;
  kGin1_1 = 0.005;
  kGin2_1 = 0.005;
  kTC1_1 = 0.005;
  kTC2_1 = 0.005;
  kTCd1_1 = 5e-5;
  kTCd2_1 = 5e-5;

  // Reactions:
  vTL1: => cyt_prot__LIGAND_; kTL1_1*cyt_mrna__LIGAND_*Cytoplasm;
  vTL2: => cyt_prot__RECEPTOR_; kTL2_1*cyt_mrna__RECEPTOR_*Cytoplasm;
  vLR1: cyt_prot__LIGAND_ + cyt_prot__RECEPTOR_ => cyt_prot__LIGAND__RECEPTOR_; kLR1_1*cyt_prot__LIGAND_*cyt_prot__RECEPTOR_*Cytoplasm;
  vLR2: cyt_prot__LIGAND__RECEPTOR_ => cyt_prot__LIGAND_ + cyt_prot__RECEPTOR_; kLR2_1*cyt_prot__LIGAND__RECEPTOR_*Cytoplasm;
  vLR3: cyt_prot__LIGAND_ => ; kLR3_1*cyt_prot__LIGAND_*Cytoplasm;
  vLR4: cyt_prot__RECEPTOR_ => ; kLR4_1*cyt_prot__RECEPTOR_*Cytoplasm;
  vLR5: cyt_prot__LIGAND__RECEPTOR_ => ; kLR5_1*cyt_prot__LIGAND__RECEPTOR_*Cytoplasm;

  // Unit definitions:
  unit volume = litre;
  unit time_unit = second;
  unit substance = 1e-9 mole;
  unit nM = 1e-9 mole / litre;
end
